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/batch
! ANSYS input file written by Workbench version 2025 R1
! File used for geometry attach: C:\Users\mhmd\Desktop\Ansys mechanical\1d element lec12\Truss_files\dp0\SYS\DM\SYS.scdocx
/title,Truss--Static Structural (A5)
/COM,/COM,     ANSYSMotion, 2025.1
/com,--- Data in consistent NMM units. See Solving Units in the help system for more information.
/units,MPA
/prep7
! Turn off shape checking because checks already performed inside WB mesher.
! See help system for more information.
SHPP,OFF,,NOWARN
etcon,set             ! allow ANSYS to choose best KEYOP's for 180x elements, resets any applicable keyopt to MAPDL defaults
/com,*********** Nodes for the whole assembly ***********
nblock,3,,404
(1i9,3e20.9e3)
        1     2.265021197E+03     3.629311743E+03    -4.841229183E+00
        2     2.265021197E+03     3.529311743E+03    -4.841229183E+00
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-1
/com,*********** Elements for Body 1 'Beam (Extracted Profile1)' ***********
et,1,188
keyo,1,3,2
eblock,19,solid,,2
(19i9)
        1        1        1        1        0        0        0        0        3        0        1        1        3      161
        1        1        1        1        0        0        0        0        3        0        2        3        2      162
-1
/com,*********** Elements for Body 2 'Beam (Extracted Profile1)' ***********
et,2,188
keyo,2,3,2
eblock,19,solid,,2
(19i9)
        2        2        2        2        0        0        0        0        3        0        3        4        6      163
        2        2        2        2        0        0        0        0        3        0        4        6        5      164
-1
/com,*********** Elements for Body 3 'Beam (Extracted Profile1)' ***********
et,3,188
keyo,3,3,2
eblock,19,solid,,2
(19i9)
        3        3        3        3        0        0        0        0        3        0        5        7        9      165
        3        3        3        3        0        0        0        0        3        0        6        9        8      166
-1
/com,*********** Elements for Body 4 'Beam (Extracted Profile1)' ***********
et,4,188
keyo,4,3,2
eblock,19,solid,,2
(19i9)
        4        4        4        4        0        0        0        0        3        0        7       10       12      167
        4        4        4        4        0        0        0        0        3        0        8       12       11      168
-1
/com,*********** Elements for Body 5 'Beam (Extracted Profile1)' ***********
et,5,188
keyo,5,3,2
eblock,19,solid,,3
(19i9)
        5        5        5        5        0        0        0        0        3        0        9       13       15      169
        5        5        5        5        0        0        0        0        3        0       10       15       16      170
        5        5        5        5        0        0        0        0        3        0       11       16       14      171
-1
/com,*********** Elements for Body 6 'Beam (Extracted Profile1)' ***********
et,6,188
keyo,6,3,2
eblock,19,solid,,2
(19i9)
        6        6        6        6        0        0        0        0        3        0       12       17       19      172
        6        6        6        6        0        0        0        0        3        0       13       19       18      173
-1
/com,*********** Elements for Body 7 'Beam (Extracted Profile1)' ***********
et,7,188
keyo,7,3,2
eblock,19,solid,,3
(19i9)
        7        7        7        7        0        0        0        0        3        0       14       20       22      174
        7        7        7        7        0        0        0        0        3        0       15       22       23      175
        7        7        7        7        0        0        0        0        3        0       16       23       21      176
-1
/com,*********** Elements for Body 8 'Beam (Extracted Profile1)' ***********
et,8,188
keyo,8,3,2
eblock,19,solid,,2
(19i9)
        8        8        8        8        0        0        0        0        3        0       17       24       26      177
        8        8        8        8        0        0        0        0        3        0       18       26       25      178
-1
/com,*********** Elements for Body 9 'Beam (Extracted Profile1)' ***********
et,9,188
keyo,9,3,2
eblock,19,solid,,5
(19i9)
        9        9        9        9        0        0        0        0        3        0       19       27       29      179
        9        9        9        9        0        0        0        0        3        0       20       29       30      180
        9        9        9        9        0        0        0        0        3        0       21       30       28      181
        9        9        9        9        0        0        0        0        3        0       22       28       32      182
        9        9        9        9        0        0        0        0        3        0       23       32       31      183
-1
/com,*********** Elements for Body 10 'Beam (Extracted Profile1)' ***********
et,10,188
keyo,10,3,2
eblock,19,solid,,5
(19i9)
       10       10       10       10        0        0        0        0        3        0       24       33       35      184
       10       10       10       10        0        0        0        0        3        0       25       35       36      185
       10       10       10       10        0        0        0        0        3        0       26       36       34      186
       10       10       10       10        0        0        0        0        3        0       27       37       38      187
       10       10       10       10        0        0        0        0        3        0       28       38       33      188
-1
/com,*********** Elements for Body 11 'Beam (Extracted Profile1)' ***********
et,11,188
keyo,11,3,2
eblock,19,solid,,3
(19i9)
       11       11       11       11        0        0        0        0        3        0       29       39       41      189
       11       11       11       11        0        0        0        0        3        0       30       41       42      190
       11       11       11       11        0        0        0        0        3        0       31       42       40      191
-1
/com,*********** Elements for Body 12 'Beam (Extracted Profile1)' ***********
et,12,188
keyo,12,3,2
eblock,19,solid,,3
(19i9)
       12       12       12       12        0        0        0        0        3        0       32       43       45      192
       12       12       12       12        0        0        0        0        3        0       33       45       46      193
       12       12       12       12        0        0        0        0        3        0       34       46       44      194
-1
/com,*********** Elements for Body 13 'Beam (Extracted Profile1)' ***********
et,13,188
keyo,13,3,2
eblock,19,solid,,3
(19i9)
       13       13       13       13        0        0        0        0        3        0       35       47       49      195
       13       13       13       13        0        0        0        0        3        0       36       49       50      196
       13       13       13       13        0        0        0        0        3        0       37       50       48      197
-1
/com,*********** Elements for Body 14 'Beam (Extracted Profile1)' ***********
et,14,188
keyo,14,3,2
eblock,19,solid,,3
(19i9)
       14       14       14       14        0        0        0        0        3        0       38       51       53      198
       14       14       14       14        0        0        0        0        3        0       39       53       54      199
       14       14       14       14        0        0        0        0        3        0       40       54       52      200
-1
/com,*********** Elements for Body 15 'Beam (Extracted Profile1)' ***********
et,15,188
keyo,15,3,2
eblock,19,solid,,5
(19i9)
       15       15       15       15        0        0        0        0        3        0       41       55       57      201
       15       15       15       15        0        0        0        0        3        0       42       57       58      202
       15       15       15       15        0        0        0        0        3        0       43       58       56      203
       15       15       15       15        0        0        0        0        3        0       44       56       60      204
       15       15       15       15        0        0        0        0        3        0       45       60       59      205
-1
/com,*********** Elements for Body 16 'Beam (Extracted Profile1)' ***********
et,16,188
keyo,16,3,2
eblock,19,solid,,5
(19i9)
       16       16       16       16        0        0        0        0        3        0       46       61       63      206
       16       16       16       16        0        0        0        0        3        0       47       63       64      207
       16       16       16       16        0        0        0        0        3        0       48       64       62      208
       16       16       16       16        0        0        0        0        3        0       49       65       66      209
       16       16       16       16        0        0        0        0        3        0       50       66       61      210
-1
/com,*********** Elements for Body 17 'Beam (Extracted Profile1)' ***********
et,17,188
keyo,17,3,2
eblock,19,solid,,2
(19i9)
       17       17       17       17        0        0        0        0        3        0       51       67       69      211
       17       17       17       17        0        0        0        0        3        0       52       69       68      212
-1
/com,*********** Elements for Body 18 'Beam (Extracted Profile1)' ***********
et,18,188
keyo,18,3,2
eblock,19,solid,,3
(19i9)
       18       18       18       18        0        0        0        0        3        0       53       70       72      213
       18       18       18       18        0        0        0        0        3        0       54       72       73      214
       18       18       18       18        0        0        0        0        3        0       55       73       71      215
-1
/com,*********** Elements for Body 19 'Beam (Extracted Profile1)' ***********
et,19,188
keyo,19,3,2
eblock,19,solid,,2
(19i9)
       19       19       19       19        0        0        0        0        3        0       56       74       76      216
       19       19       19       19        0        0        0        0        3        0       57       76       75      217
-1
/com,*********** Elements for Body 20 'Beam (Extracted Profile1)' ***********
et,20,188
keyo,20,3,2
eblock,19,solid,,3
(19i9)
       20       20       20       20        0        0        0        0        3        0       58       77       79      218
       20       20       20       20        0        0        0        0        3        0       59       79       80      219
       20       20       20       20        0        0        0        0        3        0       60       80       78      220
-1
/com,*********** Elements for Body 21 'Beam (Extracted Profile1)' ***********
et,21,188
keyo,21,3,2
eblock,19,solid,,2
(19i9)
       21       21       21       21        0        0        0        0        3        0       61       81       83      221
       21       21       21       21        0        0        0        0        3        0       62       83       82      222
-1
/com,*********** Elements for Body 22 'Beam (Extracted Profile1)' ***********
et,22,188
keyo,22,3,2
eblock,19,solid,,2
(19i9)
       22       22       22       22        0        0        0        0        3        0       63       84       86      223
       22       22       22       22        0        0        0        0        3        0       64       86       85      224
-1
/com,*********** Elements for Body 23 'Beam (Extracted Profile2)' ***********
et,23,188
keyo,23,3,2
eblock,19,solid,,58
(19i9)
       23       23       23       23        0        0        0        0        3        0       65        1       87      225
       23       23       23       23        0        0        0        0        3        0       66       87        4      226
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-1
/com,*********** Elements for Body 24 'Beam (Extracted Profile2)' ***********
et,24,188
keyo,24,3,2
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et,25,188
keyo,25,3,2
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et,26,188
keyo,26,3,2
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et,27,188
keyo,27,3,2
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et,28,188
keyo,28,3,2
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et,29,188
keyo,29,3,2
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et,30,188
keyo,30,3,2
eblock,19,solid,,2
(19i9)
       30       30       30       30        0        0        0        0        3        0      207      119      157      367
       30       30       30       30        0        0        0        0        3        0      208      157      113      368
-1
/com,*********** Send User Defined Coordinate System(s) ***********
csys,0
toffst,273.15,      ! Temperature offset from absolute zero
/com,*********** Set Reference Temperature ***********
tref,22.
/com,*********** Send Materials ***********
Temperature = 'TEMP' ! Temperature
MP,DENS,1,7.85e-09,	! tonne mm^-3
MP,ALPX,1,1.2e-05,	! C^-1
MP,C,1,434000000,	! mm^2 s^-2 C^-1
MP,KXX,1,60.5,	! tonne mm s^-3 C^-1
MP,RSVX,1,0.00017,	! ohm mm
MP,EX,1,200000,	! tonne s^-2 mm^-1
MP,NUXY,1,0.3,
MP,MURX,1,10000,

Temperature = 'TEMP' ! Temperature
MP,DENS,2,7.85e-09,	! tonne mm^-3
MP,ALPX,2,1.2e-05,	! C^-1
MP,C,2,434000000,	! mm^2 s^-2 C^-1
MP,KXX,2,60.5,	! tonne mm s^-3 C^-1
MP,RSVX,2,0.00017,	! ohm mm
MP,EX,2,200000,	! tonne s^-2 mm^-1
MP,NUXY,2,0.3,
MP,MURX,2,10000,

Temperature = 'TEMP' ! Temperature
MP,DENS,3,7.85e-09,	! tonne mm^-3
MP,ALPX,3,1.2e-05,	! C^-1
MP,C,3,434000000,	! mm^2 s^-2 C^-1
MP,KXX,3,60.5,	! tonne mm s^-3 C^-1
MP,RSVX,3,0.00017,	! ohm mm
MP,EX,3,200000,	! tonne s^-2 mm^-1
MP,NUXY,3,0.3,
MP,MURX,3,10000,

Temperature = 'TEMP' ! Temperature
MP,DENS,4,7.85e-09,	! tonne mm^-3
MP,ALPX,4,1.2e-05,	! C^-1
MP,C,4,434000000,	! mm^2 s^-2 C^-1
MP,KXX,4,60.5,	! tonne mm s^-3 C^-1
MP,RSVX,4,0.00017,	! ohm mm
MP,EX,4,200000,	! tonne s^-2 mm^-1
MP,NUXY,4,0.3,
MP,MURX,4,10000,

Temperature = 'TEMP' ! Temperature
MP,DENS,5,7.85e-09,	! tonne mm^-3
MP,ALPX,5,1.2e-05,	! C^-1
MP,C,5,434000000,	! mm^2 s^-2 C^-1
MP,KXX,5,60.5,	! tonne mm s^-3 C^-1
MP,RSVX,5,0.00017,	! ohm mm
MP,EX,5,200000,	! tonne s^-2 mm^-1
MP,NUXY,5,0.3,
MP,MURX,5,10000,

Temperature = 'TEMP' ! Temperature
MP,DENS,6,7.85e-09,	! tonne mm^-3
MP,ALPX,6,1.2e-05,	! C^-1
MP,C,6,434000000,	! mm^2 s^-2 C^-1
MP,KXX,6,60.5,	! tonne mm s^-3 C^-1
MP,RSVX,6,0.00017,	! ohm mm
MP,EX,6,200000,	! tonne s^-2 mm^-1
MP,NUXY,6,0.3,
MP,MURX,6,10000,

Temperature = 'TEMP' ! Temperature
MP,DENS,7,7.85e-09,	! tonne mm^-3
MP,ALPX,7,1.2e-05,	! C^-1
MP,C,7,434000000,	! mm^2 s^-2 C^-1
MP,KXX,7,60.5,	! tonne mm s^-3 C^-1
MP,RSVX,7,0.00017,	! ohm mm
MP,EX,7,200000,	! tonne s^-2 mm^-1
MP,NUXY,7,0.3,
MP,MURX,7,10000,

Temperature = 'TEMP' ! Temperature
MP,DENS,8,7.85e-09,	! tonne mm^-3
MP,ALPX,8,1.2e-05,	! C^-1
MP,C,8,434000000,	! mm^2 s^-2 C^-1
MP,KXX,8,60.5,	! tonne mm s^-3 C^-1
MP,RSVX,8,0.00017,	! ohm mm
MP,EX,8,200000,	! tonne s^-2 mm^-1
MP,NUXY,8,0.3,
MP,MURX,8,10000,

Temperature = 'TEMP' ! Temperature
MP,DENS,9,7.85e-09,	! tonne mm^-3
MP,ALPX,9,1.2e-05,	! C^-1
MP,C,9,434000000,	! mm^2 s^-2 C^-1
MP,KXX,9,60.5,	! tonne mm s^-3 C^-1
MP,RSVX,9,0.00017,	! ohm mm
MP,EX,9,200000,	! tonne s^-2 mm^-1
MP,NUXY,9,0.3,
MP,MURX,9,10000,

Temperature = 'TEMP' ! Temperature
MP,DENS,10,7.85e-09,	! tonne mm^-3
MP,ALPX,10,1.2e-05,	! C^-1
MP,C,10,434000000,	! mm^2 s^-2 C^-1
MP,KXX,10,60.5,	! tonne mm s^-3 C^-1
MP,RSVX,10,0.00017,	! ohm mm
MP,EX,10,200000,	! tonne s^-2 mm^-1
MP,NUXY,10,0.3,
MP,MURX,10,10000,

Temperature = 'TEMP' ! Temperature
MP,DENS,11,7.85e-09,	! tonne mm^-3
MP,ALPX,11,1.2e-05,	! C^-1
MP,C,11,434000000,	! mm^2 s^-2 C^-1
MP,KXX,11,60.5,	! tonne mm s^-3 C^-1
MP,RSVX,11,0.00017,	! ohm mm
MP,EX,11,200000,	! tonne s^-2 mm^-1
MP,NUXY,11,0.3,
MP,MURX,11,10000,

Temperature = 'TEMP' ! Temperature
MP,DENS,12,7.85e-09,	! tonne mm^-3
MP,ALPX,12,1.2e-05,	! C^-1
MP,C,12,434000000,	! mm^2 s^-2 C^-1
MP,KXX,12,60.5,	! tonne mm s^-3 C^-1
MP,RSVX,12,0.00017,	! ohm mm
MP,EX,12,200000,	! tonne s^-2 mm^-1
MP,NUXY,12,0.3,
MP,MURX,12,10000,

Temperature = 'TEMP' ! Temperature
MP,DENS,13,7.85e-09,	! tonne mm^-3
MP,ALPX,13,1.2e-05,	! C^-1
MP,C,13,434000000,	! mm^2 s^-2 C^-1
MP,KXX,13,60.5,	! tonne mm s^-3 C^-1
MP,RSVX,13,0.00017,	! ohm mm
MP,EX,13,200000,	! tonne s^-2 mm^-1
MP,NUXY,13,0.3,
MP,MURX,13,10000,

Temperature = 'TEMP' ! Temperature
MP,DENS,14,7.85e-09,	! tonne mm^-3
MP,ALPX,14,1.2e-05,	! C^-1
MP,C,14,434000000,	! mm^2 s^-2 C^-1
MP,KXX,14,60.5,	! tonne mm s^-3 C^-1
MP,RSVX,14,0.00017,	! ohm mm
MP,EX,14,200000,	! tonne s^-2 mm^-1
MP,NUXY,14,0.3,
MP,MURX,14,10000,

Temperature = 'TEMP' ! Temperature
MP,DENS,15,7.85e-09,	! tonne mm^-3
MP,ALPX,15,1.2e-05,	! C^-1
MP,C,15,434000000,	! mm^2 s^-2 C^-1
MP,KXX,15,60.5,	! tonne mm s^-3 C^-1
MP,RSVX,15,0.00017,	! ohm mm
MP,EX,15,200000,	! tonne s^-2 mm^-1
MP,NUXY,15,0.3,
MP,MURX,15,10000,

Temperature = 'TEMP' ! Temperature
MP,DENS,16,7.85e-09,	! tonne mm^-3
MP,ALPX,16,1.2e-05,	! C^-1
MP,C,16,434000000,	! mm^2 s^-2 C^-1
MP,KXX,16,60.5,	! tonne mm s^-3 C^-1
MP,RSVX,16,0.00017,	! ohm mm
MP,EX,16,200000,	! tonne s^-2 mm^-1
MP,NUXY,16,0.3,
MP,MURX,16,10000,

Temperature = 'TEMP' ! Temperature
MP,DENS,17,7.85e-09,	! tonne mm^-3
MP,ALPX,17,1.2e-05,	! C^-1
MP,C,17,434000000,	! mm^2 s^-2 C^-1
MP,KXX,17,60.5,	! tonne mm s^-3 C^-1
MP,RSVX,17,0.00017,	! ohm mm
MP,EX,17,200000,	! tonne s^-2 mm^-1
MP,NUXY,17,0.3,
MP,MURX,17,10000,

Temperature = 'TEMP' ! Temperature
MP,DENS,18,7.85e-09,	! tonne mm^-3
MP,ALPX,18,1.2e-05,	! C^-1
MP,C,18,434000000,	! mm^2 s^-2 C^-1
MP,KXX,18,60.5,	! tonne mm s^-3 C^-1
MP,RSVX,18,0.00017,	! ohm mm
MP,EX,18,200000,	! tonne s^-2 mm^-1
MP,NUXY,18,0.3,
MP,MURX,18,10000,

Temperature = 'TEMP' ! Temperature
MP,DENS,19,7.85e-09,	! tonne mm^-3
MP,ALPX,19,1.2e-05,	! C^-1
MP,C,19,434000000,	! mm^2 s^-2 C^-1
MP,KXX,19,60.5,	! tonne mm s^-3 C^-1
MP,RSVX,19,0.00017,	! ohm mm
MP,EX,19,200000,	! tonne s^-2 mm^-1
MP,NUXY,19,0.3,
MP,MURX,19,10000,

Temperature = 'TEMP' ! Temperature
MP,DENS,20,7.85e-09,	! tonne mm^-3
MP,ALPX,20,1.2e-05,	! C^-1
MP,C,20,434000000,	! mm^2 s^-2 C^-1
MP,KXX,20,60.5,	! tonne mm s^-3 C^-1
MP,RSVX,20,0.00017,	! ohm mm
MP,EX,20,200000,	! tonne s^-2 mm^-1
MP,NUXY,20,0.3,
MP,MURX,20,10000,

Temperature = 'TEMP' ! Temperature
MP,DENS,21,7.85e-09,	! tonne mm^-3
MP,ALPX,21,1.2e-05,	! C^-1
MP,C,21,434000000,	! mm^2 s^-2 C^-1
MP,KXX,21,60.5,	! tonne mm s^-3 C^-1
MP,RSVX,21,0.00017,	! ohm mm
MP,EX,21,200000,	! tonne s^-2 mm^-1
MP,NUXY,21,0.3,
MP,MURX,21,10000,

Temperature = 'TEMP' ! Temperature
MP,DENS,22,7.85e-09,	! tonne mm^-3
MP,ALPX,22,1.2e-05,	! C^-1
MP,C,22,434000000,	! mm^2 s^-2 C^-1
MP,KXX,22,60.5,	! tonne mm s^-3 C^-1
MP,RSVX,22,0.00017,	! ohm mm
MP,EX,22,200000,	! tonne s^-2 mm^-1
MP,NUXY,22,0.3,
MP,MURX,22,10000,

Temperature = 'TEMP' ! Temperature
MP,DENS,23,7.85e-09,	! tonne mm^-3
MP,ALPX,23,1.2e-05,	! C^-1
MP,C,23,434000000,	! mm^2 s^-2 C^-1
MP,KXX,23,60.5,	! tonne mm s^-3 C^-1
MP,RSVX,23,0.00017,	! ohm mm
MP,EX,23,200000,	! tonne s^-2 mm^-1
MP,NUXY,23,0.3,
MP,MURX,23,10000,

Temperature = 'TEMP' ! Temperature
MP,DENS,24,7.85e-09,	! tonne mm^-3
MP,ALPX,24,1.2e-05,	! C^-1
MP,C,24,434000000,	! mm^2 s^-2 C^-1
MP,KXX,24,60.5,	! tonne mm s^-3 C^-1
MP,RSVX,24,0.00017,	! ohm mm
MP,EX,24,200000,	! tonne s^-2 mm^-1
MP,NUXY,24,0.3,
MP,MURX,24,10000,

Temperature = 'TEMP' ! Temperature
MP,DENS,25,7.85e-09,	! tonne mm^-3
MP,ALPX,25,1.2e-05,	! C^-1
MP,C,25,434000000,	! mm^2 s^-2 C^-1
MP,KXX,25,60.5,	! tonne mm s^-3 C^-1
MP,RSVX,25,0.00017,	! ohm mm
MP,EX,25,200000,	! tonne s^-2 mm^-1
MP,NUXY,25,0.3,
MP,MURX,25,10000,

Temperature = 'TEMP' ! Temperature
MP,DENS,26,7.85e-09,	! tonne mm^-3
MP,ALPX,26,1.2e-05,	! C^-1
MP,C,26,434000000,	! mm^2 s^-2 C^-1
MP,KXX,26,60.5,	! tonne mm s^-3 C^-1
MP,RSVX,26,0.00017,	! ohm mm
MP,EX,26,200000,	! tonne s^-2 mm^-1
MP,NUXY,26,0.3,
MP,MURX,26,10000,

Temperature = 'TEMP' ! Temperature
MP,DENS,27,7.85e-09,	! tonne mm^-3
MP,ALPX,27,1.2e-05,	! C^-1
MP,C,27,434000000,	! mm^2 s^-2 C^-1
MP,KXX,27,60.5,	! tonne mm s^-3 C^-1
MP,RSVX,27,0.00017,	! ohm mm
MP,EX,27,200000,	! tonne s^-2 mm^-1
MP,NUXY,27,0.3,
MP,MURX,27,10000,

Temperature = 'TEMP' ! Temperature
MP,DENS,28,7.85e-09,	! tonne mm^-3
MP,ALPX,28,1.2e-05,	! C^-1
MP,C,28,434000000,	! mm^2 s^-2 C^-1
MP,KXX,28,60.5,	! tonne mm s^-3 C^-1
MP,RSVX,28,0.00017,	! ohm mm
MP,EX,28,200000,	! tonne s^-2 mm^-1
MP,NUXY,28,0.3,
MP,MURX,28,10000,

Temperature = 'TEMP' ! Temperature
MP,DENS,29,7.85e-09,	! tonne mm^-3
MP,ALPX,29,1.2e-05,	! C^-1
MP,C,29,434000000,	! mm^2 s^-2 C^-1
MP,KXX,29,60.5,	! tonne mm s^-3 C^-1
MP,RSVX,29,0.00017,	! ohm mm
MP,EX,29,200000,	! tonne s^-2 mm^-1
MP,NUXY,29,0.3,
MP,MURX,29,10000,

Temperature = 'TEMP' ! Temperature
MP,DENS,30,7.85e-09,	! tonne mm^-3
MP,ALPX,30,1.2e-05,	! C^-1
MP,C,30,434000000,	! mm^2 s^-2 C^-1
MP,KXX,30,60.5,	! tonne mm s^-3 C^-1
MP,RSVX,30,0.00017,	! ohm mm
MP,EX,30,200000,	! tonne s^-2 mm^-1
MP,NUXY,30,0.3,
MP,MURX,30,10000,

/com,*********** Send Beam Properties ***********
SECTYPE,1,BEAM,CTUB
SECDATA,3.75,5.
secoffset,cent

SECTYPE,2,BEAM,CTUB
SECDATA,3.75,5.
secoffset,cent

SECTYPE,3,BEAM,CTUB
SECDATA,3.75,5.
secoffset,cent

SECTYPE,4,BEAM,CTUB
SECDATA,3.75,5.
secoffset,cent

SECTYPE,5,BEAM,CTUB
SECDATA,3.75,5.
secoffset,cent

SECTYPE,6,BEAM,CTUB
SECDATA,3.75,5.
secoffset,cent

SECTYPE,7,BEAM,CTUB
SECDATA,3.75,5.
secoffset,cent

SECTYPE,8,BEAM,CTUB
SECDATA,3.75,5.
secoffset,cent

SECTYPE,9,BEAM,CTUB
SECDATA,3.75,5.
secoffset,cent

SECTYPE,10,BEAM,CTUB
SECDATA,3.75,5.
secoffset,cent

SECTYPE,11,BEAM,CTUB
SECDATA,3.75,5.
secoffset,cent

SECTYPE,12,BEAM,CTUB
SECDATA,3.75,5.
secoffset,cent

SECTYPE,13,BEAM,CTUB
SECDATA,3.75,5.
secoffset,cent

SECTYPE,14,BEAM,CTUB
SECDATA,3.75,5.
secoffset,cent

SECTYPE,15,BEAM,CTUB
SECDATA,3.75,5.
secoffset,cent

SECTYPE,16,BEAM,CTUB
SECDATA,3.75,5.
secoffset,cent

SECTYPE,17,BEAM,CTUB
SECDATA,3.75,5.
secoffset,cent

SECTYPE,18,BEAM,CTUB
SECDATA,3.75,5.
secoffset,cent

SECTYPE,19,BEAM,CTUB
SECDATA,3.75,5.
secoffset,cent

SECTYPE,20,BEAM,CTUB
SECDATA,3.75,5.
secoffset,cent

SECTYPE,21,BEAM,CTUB
SECDATA,3.75,5.
secoffset,cent

SECTYPE,22,BEAM,CTUB
SECDATA,3.75,5.
secoffset,cent

SECTYPE,23,BEAM,CTUB
SECDATA,8.75000000000001,10.
secoffset,cent

SECTYPE,24,BEAM,CTUB
SECDATA,8.75000000000001,10.
secoffset,cent

SECTYPE,25,BEAM,HREC
SECDATA,19.9999999999991,9.99999999999845,1.24999999999997,1.24999999999931,1.2500000000002,1.2500000000002
secoffset,cent

SECTYPE,26,BEAM,HREC
SECDATA,19.9999999999991,9.99999999999845,1.24999999999997,1.24999999999931,1.2500000000002,1.2500000000002
secoffset,cent

SECTYPE,27,BEAM,RECT
SECDATA,3.74999999999748,33.75
secoffset,cent

SECTYPE,28,BEAM,RECT
SECDATA,3.74999999999748,33.75
secoffset,cent

SECTYPE,29,BEAM,RECT
SECDATA,3.74999999999748,33.75
secoffset,cent

SECTYPE,30,BEAM,RECT
SECDATA,3.74999999999748,33.75
secoffset,cent

!************************* Model Summary ********************
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!Beam (Extracted Profile4),	Structural Steel,	matid,	30
!************************* End Model Summary ********************
/com,*********** Fixed Supports ***********
CMBLOCK,_FIXEDSU,NODE,        4
(8i10)
        88        91       142       148
cmsel,s,_FIXEDSU
d,all,all
nsel,all
/com,*********** Define Vertex Force Using Follower Elements ***********
et,31,201
keyo,31,1,1         ! Keep the direction constant
keyo,31,2,1         ! Apply Forces only, not moment
mat,31
real,31
type,31
en,209,109
en,210,113
en,211,117
en,212,119
r,31
rmod,31,1,1.0,              ! FX
mat,32
real,32
type,31
en,213,109
en,214,113
en,215,117
en,216,119
r,32
rmod,32,2,1.0,              ! FY
mat,33
real,33
type,31
en,217,109
en,218,113
en,219,117
en,220,119
r,33
rmod,33,3,1.0,              ! FZ
fini
/com,****************************************************************************
/com,*************************    SOLUTION       ********************************
/com,****************************************************************************
/solu
antype,0                   ! static analysis
_thickRatio=  0     ! Ratio of thick parts in the model
eqsl,sparse,,,,,1
cntr,print,1               ! print out contact info and also make no initial contact an error
cncheck,dmp		!	Enable program controlled contact splitting for distributed memory parallel run
dmpoption,emat,no             ! Don't combine emat file for DANSYS
dmpoption,esav,no             ! Don't combine esav file for DANSYS
nldiag,cont,iter           ! print out contact info each equilibrium iteration
rescontrol,,none                 ! Do not keep any restart files
/com,****************************************************
/com,******************* SOLVE FOR LS 1 OF 1 ****************
esel,s,real,,31
sfe,all,1,pres,1,0.
esel,s,real,,32
sfe,all,1,pres,1,-100.
esel,s,real,,33
sfe,all,1,pres,1,0.
esel,all
nsub,1,1,1
time,1.
outres,erase
outres,all,none
outres,nsol,all,
outres,rsol,all
outres,eangl,all
outres,etmp,all
outres,veng,all
outres,strs,all,
outres,epel,all,
outres,eppl,all,
outres,cont,all,
esel,s,type,,1
esel,a,type,,2,30
cm,_elmisc,elem
esel,all
outres,misc,all,_elmisc
! *********** WB SOLVE COMMAND ***********
! check interactive state
*get,ANSINTER_,active,,int
*if,ANSINTER_,ne,0,then
/eof
*endif
solve
/com *************** Write FE CONNECTORS *********
CEWRITE,file,ce,,INTE
/com,****************************************************
/com,*************** FINISHED SOLVE FOR LS 1 *************
*get,_NSOLTHREADS,active,0,ntfs
*get,_NSOLPROCESSES,active,0,npfs
/post1
fini
